*NODE, NSET=ALL
	1, 0.000000e+00, 0.000000e+00, 0.000000e+00
	2, 1.000000e-03, 0.000000e+00, 0.000000e+00
	3, 2.000000e-03, 0.000000e+00, 0.000000e+00
	4, 3.000000e-03, 0.000000e+00, 0.000000e+00
	5, 4.000000e-03, 0.000000e+00, 0.000000e+00
	6, 5.000000e-03, 0.000000e+00, 0.000000e+00
	7, 6.000000e-03, 0.000000e+00, 0.000000e+00
	8, 7.000000e-03, 0.000000e+00, 0.000000e+00
	9, 8.000000e-03, 0.000000e+00, 0.000000e+00
	10, 9.000000e-03, 0.000000e+00, 0.000000e+00
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*ELEMENT, TYPE=B21, ELSET=viga
	1, 1, 2
	2, 2, 3
	3, 3, 4
	4, 4, 5
	5, 5, 6
	6, 6, 7
	7, 7, 8
	8, 8, 9
	9, 9, 10
	10, 10, 11
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*MATERIAL, NAME=aluminio
*ELASTIC, TYPE=ISOTROPIC
	110000000000.0, 0.3
*DENSITY
	8780.0
*BEAM SECTION, ELSET=viga, MATERIAL=aluminio, SECTION=rect
	1, 0.0002
	0.0, 1.0, 0.0
*BOUNDARY
	1, 1, 6, 0.0
*STEP
*FREQUENCY, EIGENSOLVER=SUBSPACE
	3,,,,
*NODE FILE, OUTPUT=2D
	U
*EL FILE, OUTPUT=2D
	E, S
*END STEP
